# UH-Fluor Industrial Conference, 2019
# Construction-Driven Execution Design Challenge
#
# The AquaDucks
#
# Optimized Solution
# (followed by calculations and derivations)
# A "junction" is one of the 13 locations at which distance and elevation data were given. They are numbered from beginning to end, 1 through 13. For the initial solution, only junctions are eligible as pump locations.
#
# A "section" is one of the 12 pipeline sections between junctions. They are numbered from beginning to end, with section number corresponding to the previous junction. E.g., section 4 is located between junctions 4 and 5
#
# Pump selection: E
#
# Pump Location: Junction 10
#
# Mill Runs: Schedule 5, 10, and 20
#
# Schedule  5: Sections 1, 6, 7, 8, 9, 12
# Schedule 10: Section  5
# Schedule 20: Sections  2, 3, 4, 10, 11
#
# Steel used: 9865 tons
#
# Track-hoe-days:
# Pipeline Section Thickness Calculations
# The AquaDucks
F := .72
σ_y := 52000 lb/in^2
E := 1.0
σ_h := σ_y*F*E
D := 30 in
P := lb/in^2
t := P*D/(2*σ_h) → 0.000400641025641*in
# The above calculation tells us that we need at least ~0.0004 inches of wall thickness per [psi] of gauge pressure. This is a minimum which must be maintained for every section of the pipeline.
# Site Excavation Calculation
# The AquaDucks
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W_f == f(pump, soil)  # Foundation width, function of pump selection and soil type
W_e := W_f + 2  # Excavation width
# NOTE: Excavation width has a corollary, excavation length; this is not shown in the 2D representation, but is equivalent to (L_f + 2). This value will be used to turn the area into a total excavation volume.
L_e := L_f + 2  # see Note
d_soil := f(soil)  # Foundation depth, function of soil type
m_soil := f(soil)  # Maximum slope, function of soil type
l := d_soil/m_soil  # length of small side triangle
A_excavation := W_e*d_soil + 2*((l*d_soil)/2) == d_soil(W_e + l)
V_excavation := A_excavation*L_e
# It is noted in the guidelines that the excavation extends evenly into the page; therefore, L_e can be treated as a constant rather than redetermining slope angle and trapezoid area.
V_moved := 2*V_excavation - V_foundation  # soil must be removed and replaced, less the volume taken up by the concrete foundation
V_trucked := V_foundation  # The soil that can't be put back in must be removed
# Foundation Calculation
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Soil_Bearing_Pressure == f(soil)
Weight := Weight_pump + Weight_pedestal + Weight_footing - Weight_soil
Weight_pedestal == ρ_concrete*V_pedestal
V_pedestal == L_p*W_p*H_p
L_p == L_pump + 1
W_p == W_pump + 1
H_p == d_soil - 1/2
Weight_footing == ρ_oncrete*V_footing
V_footing == L_f*W_f*H_f
H_f == 1.5
L_f == L_p
W_f == W_p
A_footing == L_f*W_f
while Weight/A_footing < Soil_Bearing_Pressure
    W_f == W_f + .001
    L_f == L_f + .001*{
        □
    }
# First WHILE loops performs a check to see if soil bearing pressure is exceeded; if it is, the footing increases in length and width
if (W_f - 1) < W_p
    L_p == L_f
    W_p == W_f
    H_f == 0
    H_p == H_p + 1.5
    while Weight/A_footing > Soil_Bearing_Pressure
        L_p == L_p + .001
        W_p == W_p + .001
# The second loop checks IF the resultant footing is large enough to warrant being a separate piece. IF the footing's width (and length) isn't at least one foot greater than that of the pedestal, the footing is removed, the pedestal increased in size, and a WHILE statement run to iteratively increase the pedestal area until it falls below the maximum soil bearing pressure
Weight_soil == ρ_soil*V_soil  # This is the weight of the soil that is displaced by the footing
# NOTE: unit weights of the different types of soil were included in the optimization program, but they were unnecessary; all configurations (all pumps, stick build/modular, all soil types) were well below the maximum soil bearing pressure even with the narrowest possible pedestal. Calculating the weight of the soil displaced would only increase this margin.
#
# However, calculating the volume of soil displaced is still necessary, since this determines how much material needs to be transported off site. See page 2, V_trucked variable.
