# UH-Fluor Industrial Conference, 2019
# Construction-Driven Execution Design Challenge
#
# The AquaDucks
#
# Initial Solution
# (followed by calculations and derivations)
# A "junction" is one of the 13 locations at which distance and elevation data were given. They are numbered from beginning to end, 1 through 13. For the initial solution, only junctions are eligible as pump locations.
#
# A "section" is one of the 12 pipeline sections between junctions. They are numbered from beginning to end, with section number corresponding to the previous junction. E.g., section 4 is located between junctions 4 and 5
#
# Pump selection: E  Cost:  $3,600,000
#
# Pump Location: Junction 10
#
# Mill Runs: Schedule 5, 10, and 20
#
# Schedule  5: Sections 1, 6, 7, 8, 9, 12
# Schedule 10: Section  5
# Schedule 20: Sections  2, 3, 4, 10, 11
#
# Steel used: 10979.5 tons  Cost:  $65,876,812
#
# Track-hoe-days:  349  Cost:  $1,750,000  (rounded to 350 days)
# Dump-truck-days:  1158  Cost:  $1,160,000  (rounded to 1160 days)
# Concrete-truck-days:  5  Cost:  $75,000
# Crane-days:  1  Cost:  $50,000
#
# Total Project Cost:  $72,511,812
# Calculation of x-values for coordinate system
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(x_2 - x_1)^2 + (y_2 - y_1)^2 == (L_2 - L_1)^2  # A list of L-values and y-values is given
(x_2 - x_1)^2 == (L_2 - L_1)^2 - (y_2 - y_1)^2
(x_2 - x_1) == sqrt(((L_2 - L_1)^2 - (y_2 - y_1)^2))
x_2 == sqrt(((L_2 - L_1)^2 - (y_2 - y_1)^2)) + x_1
x_1 == 0
# Excavation Calculation - Pump Site Leveling
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a == x_0
b == a + 500
y_0 == y(a)
j == i + 1  # i is an iterator
A == 0
B == 0  # Initialize accumulators for A and B areas
if slope(a) == slope(b)
    A == (y(b) - y(a))/2*(b - a)
else
    A == A + (1/2)*(y(x_i) + y(x_j) - y(a))*dx  # if the slope doesn't change, then we integrate over a simple right triangle; this is its area
# Otherwise, we use the trapezoidal rule for numerical integration
while y < y(x_i)
    B == B + (y(x_i) - y)*dx
    y == y + m_soil*dx  # This calculates the soil removed in the final section, B, as it slopes upward to meet the surface
Volume == (A + B)*500
# Excavation Equipment Cost for Site Leveling
#
# Calculations will be shown based on parameters in the final solution
Vol_e := 937018 ft^3
$ := ¤
trackhoe := 100 yd^3/day = 2700 ft^3/day
cost_th := 5000 $/day
dumptruck := 810 ft^3/day
cost_dt := 1000 $/day
trackhoe_days := Vol_e/trackhoe = 347.044 day
# Determining how many trackhoes/dump trucks to use is simply a matter of determining which integer to put in front of 'trackhoe' and 'dumptruck' to make the number of days less than 50
dt_days := Vol_e/dumptruck = 1156.81 day
Cost_TH := trackhoe_days*cost_th = 1735219 $
Cost_DT := dt_days*cost_dt = 1156812 $
# This site can be excavated with 348 trackhoe-days and 1157 dump-truck days; to complete the job in 50 days, 7 trackhoes can be used for 50 days, and 29 dump trucks for 40 days. These overages are necessary, since we can't hire half a truck and crews will be unlikely to work less than a full day at a remote site. This gives us a true cost:
Cost_TH == 7*50*5000 == $1750000
Cost_DT == 29*40*1000 == $1160000
Equipment_total == $2910000
# Foundation Calculation
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Soil_Bearing_Pressure == f(soil)
Weight := Weight_pump + Weight_pedestal + Weight_footing - Weight_soil
Weight_pedestal == ρ_concrete*V_pedestal
V_pedestal == L_p*W_p*H_p
L_p == L_pump + 1
W_p == W_pump + 1
H_p == d_soil - 1/2
Weight_footing == ρ_oncrete*V_footing
V_footing == L_f*W_f*H_f
W_f == W_p
H_f == 1.5
A_footing == L_f*W_f
L_f == L_p
while Weight/A_footing < Soil_Bearing_Pressure
    W_f == W_f + .001
    L_f == L_f + .001*{
        □
    }
# First WHILE loops performs a check to see if soil bearing pressure is exceeded; if it is, the footing increases in length and width
if (W_f - 1) < W_p
    L_p == L_f
    W_p == W_f
    H_f == 0
    H_p == H_p + 1.5
    while Weight/A_footing > Soil_Bearing_Pressure
        L_p == L_p + .001
        W_p == W_p + .001
# The second loop checks IF the resultant footing is large enough to warrant being a separate piece. IF the footing's width (and length) isn't at least one foot greater than that of the pedestal, the footing is removed, the pedestal increased in size, and a WHILE statement run to iteratively increase the pedestal area until it falls below the maximum soil bearing pressure
Weight_soil == ρ_soil*V_soil  # This is the weight of the soil that is displaced by the footing
# NOTE: unit weights of the different types of soil were included in the optimization program, but they were unnecessary; all configurations (all pumps, stick build/modular, all soil types) were well below the maximum soil bearing pressure even with the narrowest possible pedestal. Subtracting the weight of the soil displaced would only increase this margin.
#
# However, calculating the volume of soil displaced is still necessary, since this determines how much material needs to be transported off site. See page 7, 'V_trucked' variable.
# Excavation Calculation for Foundation
# The AquaDucks
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W_f == f(pump, soil)  # Foundation width, function of pump selection and soil type
W_e := W_f + 2  # Excavation width
# NOTE: Excavation width has a corollary, excavation length; this is not shown in the 2D representation, but is equivalent to (L_f + 2). This value will be used to turn the area into a total excavation volume.
L_e := L_f + 2  # see Note
d_soil := f(soil)  # Foundation depth, function of soil type
m_soil := f(soil)  # Maximum slope, function of soil type
l := d_soil/m_soil  # length of small side triangle
A_excavation := W_e*d_soil + 2*((l*d_soil)/2) == d_soil(W_e + l)
V_excavation := A_excavation*L_e
# It is noted in the guidelines that the excavation extends evenly into the page; therefore, L_e can be treated as a constant rather than redetermining slope angle and trapezoid area.
V_moved := 2*V_excavation - (V_foundation - (W_p*L_p))
# soil must be removed and replaced, less the volume taken up by the concrete foundation, less the amount sticking above the surface
V_trucked := V_foundation  # The soil that can't be put back in must be removed
# The above foundation equations result in the following calculations:
W_e := 18 ft
L_e := 18 ft
d := 3 ft
m := 1.333
l := d/m
A := W_e*d + 2*((l*d)/2) = 60.7517 ft^2
V_excavation := A*L_e = 1093.53 ft^3
V_foundation := 1024 ft^3
# We use the area of the pedestal, because it is equivalent to the volume of what sticks above the soil, due to the 1-foot protrusion
A_pedestal := 256 ft^2
V_trucked := V_foundation - A_pedestal*1 ft = 768 ft^3
V_moved := 2*V_excavation - V_trucked = 1419.06 ft^3  # What gets trucked away doesn't need to be put back in the hole
V_trucked/dumptruck = 0.948148 day  # 1 Dumptruck-day
V_moved/trackhoe = 0.525578 day  # 1 Trackhoe-day
# Because 1 day of each piece of equipment fits within our overages (see page 4) it is justifiable not to add them to the cost. What still needs to be calculated is the concrete truck usage:
Concrete_truck := 243 ft^3/day
cost_ct := 15000 $/day
V_foundation/Concrete_truck = 4.21399 day  # round up to 5 days
5 day*cost_ct = 75000 $
# Pipeline Section Thickness Calculations
# The AquaDucks
F := .72
σ_y := 52000 lb/in^2
E := 1.0
σ_h := σ_y*F*E
D := 30 in
P := lb/in^2
t := P*D/(2*σ_h)
P_max == 2496*t
# The above calculation tells us that we can handle 2496 psig of internal pressure for every inch of wall thickness. This is not true indefinitely; there is an accepted ratio of D:t (30:1, according to ASTM) after which the equation for a thin-walled pipe no longer holds true, and must be modified slightly. For this project, all pipes are treated as thin-walled, in accordance with the given directions. The iterative calculation process is not shown in this document; it can be found in the Fluor_script.py file included in this submission.
