# UH-Fluor Industrial Conference, 2019
# Construction-Driven Execution Design Challenge
#
# The AquaDucks
#
# Zero-Based Execution
# Pump selection: F x 2  Cost:  $3,000,000
#
# Pump Locations: Junction 9 and Junction 11
#
# Mill Runs: Schedule 10, 30, 40
#
# Schedule  10: Sections 1, 5, 6, 7, 8, 9, 10, 12
# Schedule 30: Sections  2, 3, 4
# Schedule 40: Section  11
#
# Steel used: 5028 tons  Cost:  $30,168,000
#
# Track-hoe-days:  12  Cost:  $60,000
# Dump-truck-days:  6  Cost:  $6,000
# Concrete-truck-days:  4  Cost:  $60,000
# Crane-days:  1  Cost:  $50,000
#
# Total Project Cost:  $33,342,244
# Excavation Calculations -- Site Leveling
# This was the simplest component of the design to adjust for the new parameters. Now, the area needed to be leveled is reduced to 200'x200', from the original 500'x500'. This is a decrease of 210,000 ft^(^2, and we can expect this decrease to compound even further when brought into three dimensions:)
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# For a triangle (and two-dimensional shapes in general) the area increases with the square of a given distance, all else held equal. So for two similar triangles, one of which has side lengths half those of the other, the smaller triangle will occupy 1/4 the area. This is important:
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A_1 == (2 H*2 L)/2 == 2*HL
A_2 == HL/2
A_2 == 1/4*A_1
# This relationship holds true for all triangles with similar angles.
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# Based on the above, we can see that using the excavated material to fill in an area behind the cut results in a quartering of the required excavation. Therefore, the same script as used in the initial solution was used, but the 500-foot requirement was replaced by 200, and the result divided by 4.
Junction_9 := 19973 ft^3
trackhoe := 100 yd^3/day = 2700 ft^3/day
Junction_11 := 79907 ft^3
$ := ¤
a := Junction_9/4 = 4993.25 ft^3
b := Junction_11/4 = 19976.8 ft^3
cost_th := 5000 $/day
c := a/trackhoe = 1.84935 day
d := b/trackhoe = 7.3988 day
c + d = 9.24815 day
# The ZBE excavation can be done in 10 trackhoe-days
# The same technique as above is used to calculate the number of dump-truck-days. The same quantity is being filled as is being excavated. However, the amount of material a dump truck can move per day has been multiplied by 10. This is an extremely conservative estimate for how much more material one truck can move in a day, since in this case it only needs to be moved about 100 feet.
dumptruck := 8100 ft^3/day
cost_dt := 1000 $/day
e := (a + b)/dumptruck = 3.08272 day  # 4 dump-truck-days are required
# Foundation Calculation
# At each of two locations, we will be using an F-type pump. One pump is located on silty sand, the other on firm clay. According to calculations identical to those in the initial solution, this yields two pedestal sizes as follows:
# on Silty Sand: | on Firm Clay:
Vol_pedsand := 315 ft^3
Vol_pedclay := 252 ft^3
Concrete_truck := 243 ft^3/day
cost_ct := 15000 $/day
Vol_pedsand/Concrete_truck = 1.2963 day
Vol_pedclay/Concrete_truck = 1.03704 day
# Each pour requires two trucks, for a total of 4 concrete truck days
# Excavation Calculation for Foundation
# Again, an identical technique to the initial solution was used, this time changing maximum dig slope and foundation depth for each material being excavated.
Vol_excsand := 540 ft^3
Vol_excclay := 357.75 ft^3
Vol_excavated1 := 2*Vol_excsand - (Vol_pedsand - 6 ft*8 ft*1 ft) = 813 ft^3
Vol_excavated2 := 2*Vol_excclay - (Vol_pedclay - 6 ft*8 ft*1 ft) = 511.5 ft^3
# Each needs the soil moved out, then back in: total 2 track-hoe-days
Vol_trucked := (Vol_pedsand + Vol_pedclay - 2*(6 ft*8 ft*1 ft)) = 471 ft^3
# This is one dump-truck-day, but there are two sites, so it should be two truck-days
